*Heading
** Job name: Job-5 Model name: Model-1
** Generated by: Abaqus/CAE 2022
*Preprint, echo=NO, model=NO, history=NO, contact=NO
**
** PARTS
**
*Part, name=Part-1
*Node
      1,          0.5,          0.5,          0.5
      2,          0.5,  0.400000006,          0.5
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*Element, type=C3D8R
  1,  37,  38,  44,  43,   1,   2,   8,   7
  2,  38,  39,  45,  44,   2,   3,   9,   8
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*Nset, nset=Set-1, generate
   1,  216,    1
*Elset, elset=Set-1, generate
   1,  125,    1
** Section: Section-1
*Solid Section, elset=Set-1, material=Material-1
,
*End Part
**
*Part, name=Part-2
*Node
      1,  -2.79999995,           0.,           1.
      2,  -2.79999995,  0.100000001,           1.
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*Element, type=C3D8R
  1, 100, 101, 110, 109,   1,   2,  11,  10
  2, 101, 102, 111, 110,   2,   3,  12,  11
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*Nset, nset=Set-1, generate
   1,  891,    1
*Elset, elset=Set-1, generate
   1,  640,    1
** Section: Section-1
*Solid Section, elset=Set-1, material=Material-1
,
*End Part
**
**
** ASSEMBLY
**
*Assembly, name=Assembly
**
*Instance, name=Part-1-1, part=Part-1
*End Instance
**
*Instance, name=Part-2-1, part=Part-2
          1.,           0.,         -0.5
*End Instance
**
*Instance, name=Part-1-2, part=Part-1
        0.55,           0.,           0.
*End Instance
**
*Nset, nset=Set-1, instance=Part-1-1, generate
  1,  36,   1
*Elset, elset=Set-1, instance=Part-1-1, generate
  1,  25,   1
*Nset, nset=Set-2, instance=Part-1-1, generate
 181,  216,    1
*Elset, elset=Set-2, instance=Part-1-1, generate
 101,  125,    1
*Nset, nset=Set-3, instance=Part-1-1, generate
  6,  36,   6
*Elset, elset=Set-3, instance=Part-1-1, generate
  5,  25,   5
*Nset, nset=Set-4, instance=Part-1-1, generate
  1,  31,   6
*Elset, elset=Set-4, instance=Part-1-1, generate
  1,  21,   5
*Nset, nset=Set-5, instance=Part-2-1, generate
   1,  891,    1
*Elset, elset=Set-5, instance=Part-2-1, generate
   1,  640,    1
*Nset, nset=Set-6, instance=Part-1-2, generate
   1,  211,    6
*Elset, elset=Set-6, instance=Part-1-2, generate
   1,  121,    5
*Nset, nset=Set-7, instance=Part-1-2, generate
   6,  216,    6
*Elset, elset=Set-7, instance=Part-1-2, generate
   5,  125,    5
*End Assembly
**
** MATERIALS
**
*Material, name=Material-1
*Density
7850.,
*Elastic
 2.06e+11, 0.3
**
** BOUNDARY CONDITIONS
**
** Name: BC-1 Type: Symmetry/Antisymmetry/Encastre
*Boundary
Set-2, PINNED
** Name: BC-4 Type: Symmetry/Antisymmetry/Encastre
*Boundary
Set-6, PINNED
**
** PREDEFINED FIELDS
**
** Name: Predefined Field-1   Type: Velocity
*Initial Conditions, type=VELOCITY
Set-1, 2, -0.25
** Name: Predefined Field-2   Type: Velocity
*Initial Conditions, type=VELOCITY
Set-5, 1, 0.
Set-5, 2, -0.25
** Name: Predefined Field-3   Type: Velocity
*Initial Conditions, type=VELOCITY
Set-7, 1, 1.
** ----------------------------------------------------------------
**
** STEP: Step-1
**
*Step, name=Step-1, nlgeom=YES
*Dynamic, Explicit
, 0.1
*Bulk Viscosity
0.06, 1.2
**
** LOADS
**
** Name: Load-1   Type: Gravity
*Dload
, GRAV, 20., 0., -1., 0.
**
** OUTPUT REQUESTS
**
*Restart, write, number interval=1, time marks=NO
**
** FIELD OUTPUT: F-Output-1
**
*Output, field, variable=PRESELECT
**
** HISTORY OUTPUT: H-Output-1
**
*Output, history, variable=PRESELECT
*End Step
** ----------------------------------------------------------------
**
** STEP: Step-2
**
*Step, name=Step-2, nlgeom=YES
*Dynamic, Explicit
, 0.15
*Bulk Viscosity
0.06, 1.2
**
** BOUNDARY CONDITIONS
**
** Name: BC-2 Type: Velocity/Angular velocity
*Boundary, type=VELOCITY
Set-3, 1, 1, -0.05
** Name: BC-3 Type: Velocity/Angular velocity
*Boundary, type=VELOCITY
Set-4, 1, 1, 0.1
**
** OUTPUT REQUESTS
**
*Restart, write, number interval=1, time marks=NO
**
** FIELD OUTPUT: F-Output-1
**
*Output, field, variable=PRESELECT
**
** HISTORY OUTPUT: H-Output-1
**
*Output, history, variable=PRESELECT
*End Step
** ----------------------------------------------------------------
**
** STEP: Step-3
**
*Step, name=Step-3, nlgeom=YES
*Dynamic, Explicit
, 0.2
*Bulk Viscosity
0.06, 1.2
**
** BOUNDARY CONDITIONS
**
** Name: BC-1 Type: Symmetry/Antisymmetry/Encastre
*Boundary, op=NEW
Set-2, PINNED
** Name: BC-2 Type: Velocity/Angular velocity
*Boundary, op=NEW, type=VELOCITY
Set-3, 1, 1, -0.05
** Name: BC-3 Type: Velocity/Angular velocity
*Boundary, op=NEW
** Name: BC-4 Type: Symmetry/Antisymmetry/Encastre
*Boundary, op=NEW
Set-6, PINNED
**
** LOADS
**
** Name: Load-1   Type: Gravity
*Dload, op=NEW
**
** OUTPUT REQUESTS
**
*Restart, write, number interval=1, time marks=NO
**
** FIELD OUTPUT: F-Output-1
**
*Output, field, variable=PRESELECT
**
** HISTORY OUTPUT: H-Output-1
**
*Output, history, variable=PRESELECT
*End Step
